# -*- coding: utf-8 -*-
"""
Created on Wed Apr 10 13:37:13 2024

@author: lab_Harold
"""

# import Sofa
import Sofa.Core
import Constants
import os
import csv
import numpy as np

PSI = 7

LadoCubo = Constants.LadoCubo
path = os.path.dirname(os.path.abspath(__file__))+'/mesh/'

class Controller(Sofa.Core.Controller):

    def __init__(self, *args, **kwargs):
        super().__init__(*args, **kwargs)
        print(" Python::__init__::" + str(self.name.value))

        # Bandera para controlar la animacion
        self.animation_finished = False

        # Inicializar atributos con valores de kwargs
        self.RootNode = kwargs['RootNode']
        self.SPC = kwargs['SPC']
        self.Maxpressure = 6.89 * PSI  #Pa
        self.Increment = self.Maxpressure/500
        self.Pressure = 0
        self.Decreasing = False
        self.EndEffectorMO = kwargs['EndEffectorMO']

        # Definir ruta de archivo csv
        self.csv_file_path = "end_effector_data_Acordeon.csv"

        # Crear archivo CSV y escribir encabezados si no existe
        if not os.path.exists(self.csv_file_path):
            with open(self.csv_file_path, mode='w', newline='') as file:
                writer = csv.writer(file)
                writer.writerow(["Time", "Pressure","Position_X", "Position_Y" ,"Position_Z","Angle"])

        print('Finished Init')

    def save_end_effector_data(self, time):
        position = self.EndEffectorMO.position.value

        PointA = position[0]
        PointB = position[1]

        delta_x = PointB[0] - PointA[0]
        delta_y = PointB[1] - PointA[1]
        delta_z = PointB[2] - PointA[2]

        Angle = np.rad2deg(np.arctan2(delta_y, delta_x))

        # SecondPointCoord = self.EndEffectorMO.position.value[1]
        # Angle = np.rad2deg(np.arctan2(SecondPointCoord[1],SecondPointCoord[0]))

        try:
            with open(self.csv_file_path, mode='a', newline='') as file:
                writer = csv.writer(file)
                writer.writerow([time,self.Pressure,PointA[0],PointA[1],PointA[2],Angle])
        except Exception as e:
            print(f"Error al escribir en archivo csv:{e}")

    def update_pressure_increase(self, pressure, spc):
        pressure += self.Increment
        if pressure > self.Maxpressure and self.animation_finished==False:
            pressure = self.Maxpressure
        spc.value.value = [pressure]
        return pressure

    def update_pressure_decrease(self, pressure, spc):
        pressure -= self.Increment
        if pressure < 0 and not self.animation_finished:
            pressure = 0
        spc.value.value = [pressure]
        return pressure


    def onAnimateBeginEvent(self, eventType):
        # print(f"Current End-Effector position: {self.EndEffectorMO.position.value}")
        # print(f"pressure: {self.Pressure}")
        # Aquí obtienes el tiempo actual de la simulación
        current_time = self.RootNode.time.value

        # Imprimir mensaje si la animación ha terminado
        if self.animation_finished:
            # print("animación terminada")
            self.RootNode.dt = 0
            self.Pressure = 0
            return

        # Guardar datos del EndEffector
        self.save_end_effector_data(current_time)

        if not self.Decreasing:
            # Incrementar presiones
            self.Pressure = self.update_pressure_increase(self.Pressure, self.SPC)

            if self.Pressure >= self.Maxpressure:
                self.Decreasing = True
        else:
            # Decrementar presiones
            self.Pressure = self.update_pressure_decrease(self.Pressure, self.SPC)

            if self.Pressure <= 0:
                self.Decreasing = False
                self.animation_finished = True


def createScene(rootNode):

                rootNode.addObject(
                    "RequiredPlugin",
                    pluginName="""SofaPython3
                    SoftRobots
                    SoftRobots.Inverse
                    Sofa.Component.AnimationLoop
                    Sofa.Component.Constraint.Lagrangian.Correction
                    Sofa.Component.Constraint.Lagrangian.Solver
                    Sofa.Component.Engine.Select
                    Sofa.Component.IO.Mesh
                    Sofa.Component.LinearSolver.Direct
                    Sofa.Component.LinearSolver.Iterative
                    Sofa.Component.Mapping.Linear
                    Sofa.Component.Mapping.MappedMatrix
                    Sofa.Component.Mapping.NonLinear
                    Sofa.Component.Mass
                    Sofa.Component.ODESolver.Backward
                    Sofa.Component.Setting
                    Sofa.Component.SolidMechanics.FEM.Elastic
                    Sofa.Component.SolidMechanics.Spring
                    Sofa.Component.StateContainer
                    Sofa.Component.Topology.Container.Constant
                    Sofa.Component.Topology.Container.Dynamic
                    Sofa.Component.Visual
                    Sofa.GL.Component.Rendering3D
                    Sofa.GL.Component.Shader"""
                )

                rootNode.addObject(
                    "VisualStyle",
                    displayFlags="""
                        hideWireframe
                        showBehaviorModels
                        hideCollisionModels
                        hideBoundingCollisionModels
                        showForceFields
                        showInteractionForceFields""",
                )
                # rootNode.addObject('VisualStyle', displayFlags='showVisualModels hideBehaviorModels showCollisionModels hideBoundingCollisionModels showForceFields showInteractionForceFields hideWireframe')
                rootNode.addObject('RequiredPlugin', name='Sofa.Component.Topology.Mapping') # Needed to use components [Tetra2TriangleTopologicalMapping]
                rootNode.addObject('FreeMotionAnimationLoop')
                rootNode.addObject('GenericConstraintSolver', maxIterations=100, tolerance = 0.0000001)
                rootNode.dt = 0.001

		#cubito
                cubito = rootNode.addChild('CubitoAcordeon')
                cubito.addObject('EulerImplicitSolver', name='odesolver')

                cubito.addObject('SparseLDLSolver', name='preconditioner')

                cubito.addObject('ShewchukPCGLinearSolver', iterations=15, name='linearsolver', tolerance=1e-5, preconditioner='@preconditioner', use_precond=True, update_step=1)

                Loader = cubito.addObject('MeshVTKLoader', name='loader', filename='Cubitoacordeon.vtk')
                Container = cubito.addObject('TetrahedronSetTopologyContainer', src='@loader', name='container')
                cubito.addObject('TetrahedronSetTopologyModifier')

                MO = cubito.addObject('MechanicalObject', name='tetras', template='Vec3', showIndices=False)
                cubito.addObject('UniformMass', totalMass=0.5)

                boxROIStiffness = cubito.addObject('BoxROI', name='boxROIStiffness', box=[-13, 18.5, -13,  13, 20.5, 13], drawBoxes=True, position="@tetras.rest_position", tetrahedra="@container.tetrahedra")
                Container.init()
                MO.init()
                boxROIStiffness.init()
                YM1 = 110850
                YM2 = YM1*100
                YMArray = np.ones(len(Loader.tetras))*YM1
                IdxElementsInROI = np.array(boxROIStiffness.tetrahedronIndices.value)
                YMArray[IdxElementsInROI] = YM2
                print(f"len IdxElementsInROI: {len(IdxElementsInROI)}")

                print(f"Largo de YMArray:{len(YMArray)}")
                #cubito.addObject('TetrahedronFEMForceField', template='Vec3', name='FEM', method='large', poissonRatio=0.3,  youngModulus=180000)
                cubito.addObject('TetrahedronFEMForceField', template='Vec3', name='FEM', method='large', poissonRatio=0.3,  youngModulus=YMArray.flatten().tolist())
                #cubito.addObject('TetrahedronFEMForceField', template='Vec3', name='FEM2', method='large', poissonRatio=0.3,  youngModulus=180000)

                #cubito.addObject('TetrahedronHyperelasticityFEMForceField', name="HyperElasticMaterial", materialName="MooneyRivlin", ParameterSet="48000 -1.5e5 3000")

                cubito.addObject('BoxROI', name='boxROI', box=[-13, -0.5, -13,  13, 1.5, 13], drawBoxes=True, position="@tetras.rest_position", tetrahedra="@container.tetrahedra")
                cubito.addObject('RestShapeSpringsForceField', points='@boxROI.indices', stiffness=1e12)
                cubito.addObject('GenericConstraintCorrection', linearSolver='@preconditioner')
                #cubito.addObject('UncoupledConstraintCorrection')

        # Punto "End-effector"

                EndEffectorNode = cubito.addChild("EndEffectorNode")
                EndEffectorMO = EndEffectorNode.addObject("MechanicalObject", position=[[0,LadoCubo,0], [10,LadoCubo,0], [-10,LadoCubo,0]], showObject=True, showObjectScale=10)
                EndEffectorNode.addObject("BarycentricMapping")

        #cubito/fibers


                FiberNode = cubito.addChild("FiberReinforcementNode1")
                Density2 = 15
                IncrementAngle2 = 2*np.pi/Density2
                Radius2 = 8
                NLevels2 = 7
                LevelHeight2 = 2.1
                Points2 = []
                Edges2 = []
                for i in range(NLevels2):
                    for j in range(0,Density2):
                        Angle2 = j*IncrementAngle2
                        Coords2 = [Radius2*np.cos(Angle2), 3.5+i*LevelHeight2, Radius2*np.sin(Angle2)]
                        Points2.append(Coords2)
                        if j>=1:
                            Edges2.append([(i*Density2+j-1),(i*Density2+j)])

                            if j==Density2-1:
                                for k in range(0,NLevels2):
                                    Edges2.append([k*Density2,(1+k)*Density2-1])


                FiberNode.addObject("Mesh", position=Points2, name="Mesh", edges=Edges2)
                FiberNode.addObject("MechanicalObject", showObject=True, showObjectScale=10)
                FiberNode.addObject("MeshSpringForceField", linesStiffness=1e9)
                FiberNode.addObject("BarycentricMapping")


                FiberNode = cubito.addChild("FiberReinforcementNode3")
                Density = 10
                IncrementAngle = (np.pi/2)/Density
                Radius = 8
                Repeat = 6
                Deg = (np.pi/2)/Repeat
                LevelHeight = 14
                Points = []
                Edges = []
                for i in range(Density):
                    for j in range (0,Repeat):

                        Angle = i*IncrementAngle+Deg*19
                        Coords = [Radius*np.cos(Angle+Deg*j), 3.5+i/Density*LevelHeight, Radius*np.sin(Angle+Deg*j)]
                        Points.append(Coords)

                        if i<=Density-2:
                            Edges.append([i*Repeat+j,i*Repeat+Repeat+j])

                FiberNode.addObject("Mesh", position=Points, name="Mesh", edges=Edges)
                FiberNode.addObject("MechanicalObject", showObject=True, showObjectScale=10)
                FiberNode.addObject("MeshSpringForceField", linesStiffness=1e9)
                FiberNode.addObject("BarycentricMapping")


                FiberNode = cubito.addChild("FiberReinforcementNode4")
                Density4 = 10
                IncrementAngle4 = (-np.pi/2)/Density4
                Radius4 = 8
                Repeat4 = 6
                Deg4 = (np.pi/2)/Repeat4
                LevelHeight4 = 14
                Points4 = []
                Edges4 = []
                for i in range(Density4):
                    for j in range (0,Repeat4):

                        Angle4 = i*IncrementAngle4
                        Coords4 = [Radius4*np.cos(Angle4+Deg4*j), 3.5+i/Density4*LevelHeight4, Radius4*np.sin(Angle4+Deg4*j)]
                        Points4.append(Coords4)

                        if i<=Density4-2:
                            Edges4.append([i*Repeat4+j,i*Repeat4+Repeat4+j])

                FiberNode.addObject("Mesh", position=Points4, name="Mesh", edges=Edges4)
                FiberNode.addObject("MechanicalObject", showObject=True, showObjectScale=10)
                FiberNode.addObject("MeshSpringForceField", linesStiffness=1e9)
                FiberNode.addObject("BarycentricMapping")

		#cubito/cavity
                cavity = cubito.addChild('cavity')
                cavity.addObject('MeshSTLLoader', name='loader', filename='Cubitoacordeon_Cavity.stl')
                cavity.addObject('MeshTopology', src='@loader', name='topo')
                cavity.addObject('MechanicalObject', name='cavity')
                SPC = cavity.addObject('SurfacePressureConstraint', triangles='@topo.triangles', value=0, valueType=0)
                #cavity.addObject('BarycentricMapping', name='mapping',  mapForces=True, mapMasses=False)
                cavity.addObject('BarycentricMapping', name='mapping',  mapForces=True, mapMasses=True)


		#cubito/cubitoVisu
                cubitoVisu = cubito.addChild('visu')
                cubitoVisu.addObject("MeshSTLLoader", filename="Cubito_acordeon_visu.stl", name="loader")
                cubitoVisu.addObject("OglModel", src="@loader")
                cubitoVisu.addObject("BarycentricMapping")

                rootNode.addObject(Controller(name="ActuationController", RootNode=rootNode, SPC=SPC, EndEffectorMO=EndEffectorMO))

                return rootNode
