"""
Created on Wed Apr 20 14:32:47 2024

@author: lab_Harold
"""

# import Sofa
import Sofa.Core
import Constants

import os
import numpy as np
path = os.path.dirname(os.path.abspath(__file__))+'/mesh/'

LadoCubo = Constants.LadoCubo
PSI = 5
Displa = 4


# class Controller(Sofa.Core.Controller):

#     def __init__(self, *args, **kwargs):
#         Sofa.Core.Controller.__init__(self, *args, **kwargs)
#         print(" Python::__init__::" + str(self.name.value))

#         self.RootNode = kwargs['RootNode']
#         self.SPA = kwargs['SPA']
#         self.Increment = 0.4
#         self.Pressure = 0
#         print(kwargs['RootNode'])


#         print('Finished Init')

#     def onAnimateBeginEvent(self, eventType):
#         self.Pressure = self.Pressure + self.Increment
#         if self.Pressure > 60 or self.Pressure < 0:
#             # self.Pressure = 550
#             self.Increment = -self.Increment
#         self.SPA.value.value = [self.Pressure]

#         pass

def createScene(rootNode):

                rootNode.addObject(
                    "RequiredPlugin",
                    pluginName="""SofaPython3
                    SoftRobots
                    SoftRobots.Inverse
                    Sofa.Component.AnimationLoop
                    Sofa.Component.Constraint.Lagrangian.Correction
                    Sofa.Component.Constraint.Lagrangian.Solver
                    Sofa.Component.Engine.Select
                    Sofa.Component.IO.Mesh
                    Sofa.Component.LinearSolver.Direct
                    Sofa.Component.LinearSolver.Iterative
                    Sofa.Component.Mapping.Linear
                    Sofa.Component.Mapping.MappedMatrix
                    Sofa.Component.Mapping.NonLinear
                    Sofa.Component.Mass
                    Sofa.Component.ODESolver.Backward
                    Sofa.Component.Setting
                    Sofa.Component.SolidMechanics.FEM.Elastic
                    Sofa.Component.SolidMechanics.Spring
                    Sofa.Component.StateContainer
                    Sofa.Component.Topology.Container.Constant
                    Sofa.Component.Topology.Container.Dynamic
                    Sofa.Component.Visual
                    Sofa.GL.Component.Rendering3D
                    Sofa.GL.Component.Shader"""
                )

                rootNode.addObject(
                    "VisualStyle",
                    displayFlags="""
                        hideWireframe
                        showBehaviorModels
                        hideCollisionModels
                        hideBoundingCollisionModels
                        showForceFields
                        showInteractionForceFields""",
                )
                # rootNode.addObject('VisualStyle', displayFlags='showVisualModels hideBehaviorModels showCollisionModels hideBoundingCollisionModels showForceFields showInteractionForceFields hideWireframe')
                rootNode.addObject('RequiredPlugin', name='Sofa.Component.Topology.Mapping') # Needed to use components [Tetra2TriangleTopologicalMapping]
                rootNode.addObject('FreeMotionAnimationLoop')
                rootNode.addObject("QPInverseProblemSolver", printLog=1, epsilon=0.1, maxIterations=1000,tolerance=1e-5)
                rootNode.dt = 1

        #cubito
                cubito = rootNode.addChild('cubito')
                cubito.addObject('EulerImplicitSolver', name='odesolver')

                cubito.addObject('SparseLDLSolver', name='preconditioner')

                cubito.addObject('ShewchukPCGLinearSolver', iterations=15, name='linearsolver', tolerance=1e-5, preconditioner='@preconditioner', use_precond=True, update_step=1)

                Loader = cubito.addObject('MeshVTKLoader', name='loader', filename='CubitoEstirar.vtk')
                Container = cubito.addObject('TetrahedronSetTopologyContainer', src='@loader', name='container')
                cubito.addObject('TetrahedronSetTopologyModifier')

                MO = cubito.addObject('MechanicalObject', name='tetras', template='Vec3', showIndices=False)
                cubito.addObject('UniformMass', totalMass=0.5)

                boxROIStiffness = cubito.addObject('BoxROI', name='boxROIStiffness', box=[-13, 17.5, -13,  13, 20, 13], drawBoxes=True, position="@tetras.rest_position", tetrahedra="@container.tetrahedra")
                boxROIMain = cubito.addObject('BoxROI', name='boxROIMain', box=[-13, 2, -13,  13, 17.5, 13], drawBoxes=True, position="@tetras.rest_position", tetrahedra="@container.tetrahedra")

                Container.init()
                MO.init()
                boxROIStiffness.init()
                YM1 = 100000
                YM2 = YM1*100
                YMArray = np.ones(len(Loader.tetras))*YM1
                IdxElementsInROI = np.array(boxROIStiffness.tetrahedronIndices.value)
                YMArray[IdxElementsInROI] = YM2
                print(f"len IdxElementsInROI: {len(IdxElementsInROI)}")

                print(f"Largo de YMArray:{len(YMArray)}")
                #cubito.addObject('TetrahedronFEMForceField', template='Vec3', name='FEM', method='large', poissonRatio=0.3,  youngModulus=100000)
                cubito.addObject('TetrahedronFEMForceField', template='Vec3', name='FEM', method='large', poissonRatio=0.3,  youngModulus=YMArray.flatten().tolist())


                #cubito.addObject('TetrahedronFEMForceField', template='Vec3', name='FEM2', method='large', poissonRatio=0.3,  youngModulus=100000)

                #cubito.addObject('TetrahedronHyperelasticityFEMForceField', name="HyperElasticMaterial", materialName="MooneyRivlin", ParameterSet="48000 -1.5e5 3000")

                cubito.addObject('BoxROI', name='boxROI', box=[-13, 0, -13,  13, 2, 13], drawBoxes=True, position="@tetras.rest_position", tetrahedra="@container.tetrahedra")
                cubito.addObject('RestShapeSpringsForceField', points='@boxROI.indices', stiffness=1e12)
                cubito.addObject('GenericConstraintCorrection', linearSolver='@preconditioner')
                modelSubTopo1 = cubito.addChild('modelSubTopo1')

                boxROIMain.init()
                modelSubTopo1.addObject('TetrahedronSetTopologyContainer', position='@../loader.position', tetrahedra="@../boxROIMain.tetrahedraInROI", name='container')
                modelSubTopo1.addObject('TetrahedronFEMForceField', template='Vec3', poissonRatio=0.45, youngModulus=100000)
                modelSubTopo1.addObject('YoungModulusActuator', template='Vec3', name='actuator', maxYoungVariationRatio=0.02, minYoung=10)
                # print(f"YM Value:{modelSubTopo1.TetrahedronFEMForceField.youngModulus.value}")
                #cubito.addObject('UncoupledConstraintCorrection')


        #cubito/fibers

                FiberNode = cubito.addChild("FiberReinforcementNode")
                Density = 30
                IncrementAngle = 2*np.pi/Density
                Radius = 8
                NLevels = 7
                LevelHeight = 2
                Points = []
                Edges = []
                for i in range(NLevels):
                    for j in range(0,30):
                        Angle = j*IncrementAngle
                        Coords = [Radius*np.cos(Angle), 4+i*LevelHeight, Radius*np.sin(Angle)]
                        Points.append(Coords)
                        if j>=1:
                            Edges.append([i*Density+j-1,i*Density+j])
                            if j==29:
                                Edges.append([i*Density+j, i*Density+j-Density+1])


                FiberNode.addObject("Mesh", position=Points, name="Mesh", edges=Edges)
                FiberNode.addObject("MechanicalObject", showObject=True, showObjectScale=10)
                FiberNode.addObject("MeshSpringForceField", linesStiffness=1e7)
                FiberNode.addObject("BarycentricMapping")

		#cubito/cavity
                cavity = cubito.addChild('cavity')
                cavity.addObject('MeshSTLLoader', name='loader', filename='CubitoEstirar_Cavity.stl')
                cavity.addObject('MeshTopology', src='@loader', name='topo')
                cavity.addObject('MechanicalObject', name='cavity')
                SPA = cavity.addObject('SurfacePressureEquality', triangles='@topo.triangles', eqPressure=7000 * PSI) # 48000 Pa or 7 PSI
                #cavity.addObject('BarycentricMapping', name='mapping',  mapForces=True, mapMasses=False)
                cavity.addObject('BarycentricMapping', name='mapping',  mapForces=True, mapMasses=True)

        # Effector
        # bunny/effector
        # goal
                goal = rootNode.addChild('goal')
                goal.addObject('EulerImplicitSolver', firstOrder=True)
                goal.addObject('CGLinearSolver', iterations=100, tolerance=1e-5, threshold=1e-5)
                goal.addObject('MechanicalObject', name='goalMO', position=[0, LadoCubo + Displa , 0], showObject=True, showObjectScale=15)
                goal.addObject('SphereCollisionModel', radius=2.5, group=1)
                goal.addObject('UncoupledConstraintCorrection')

        # Punto "End-effector"
                effector = cubito.addChild('EffectorNode')
                effector.addObject('MechanicalObject', position=[0, LadoCubo, 0], showObject=True, showObjectScale=10)
                PositionEffector = effector.addObject('PositionEffector', indices=0, effectorGoal=goal.goalMO.position.linkpath)
                effector.addObject('BarycentricMapping', mapForces=False, mapMasses=False)


		#cubito/cubitoVisu
                cubitoVisu = cubito.addChild('visu')
                cubitoVisu.addObject("MeshSTLLoader", filename="Cubito_Estirar_visu.stl", name="loader")
                cubitoVisu.addObject("OglModel", src="@loader")
                cubitoVisu.addObject("BarycentricMapping")

                # rootNode.addObject(Controller(name="ActuationController", RootNode=rootNode, SPA=SPA))

                return rootNode
