# -*- coding: utf-8 -*-
"""
Created on Wed Apr 24 15:39:45 2024

@author: lab_Harold
"""

# import Sofa
import Sofa.Core
import Constants
import os
import csv
import numpy as np

LadoCubo = Constants.LadoCubo
PSI = 7

path = os.path.dirname(os.path.abspath(__file__))+'/mesh/'


class Controller(Sofa.Core.Controller):

    def __init__(self, *args, **kwargs):
        super().__init__(*args, **kwargs)
        print(" Python::__init__::" + str(self.name.value))

        # Bandera para controlar la animacion
        self.animation_finished = False

        # Inicializar atributos con valores de kwargs
        self.RootNode = kwargs['RootNode']
        self.SPC = kwargs['SPC']
        self.Maxpressure = 6.89 * PSI # PSI to KPa
        self.Increment = self.Maxpressure/500 #KPa
        self.Pressure = 0
        self.Decreasing = False
        self.EndEffectorMO = kwargs['EndEffectorMO']
        self.EndEffectorMO2 = kwargs['EndEffectorMO2']

        # Definir ruta de archivo csv
        self.csv_file_path = "end_effector_data_Estirar_hyper.csv"

        # Crear archivo CSV y escribir encabezados si no existe
        if not os.path.exists(self.csv_file_path):
            with open(self.csv_file_path, mode='w', newline='') as file:
                writer = csv.writer(file)
                writer.writerow(["Time", "Pressure","P1_Position_X", "P1_Position_Y" ,"P1_Position_Z","P2_Position_X", "P2_Position_Y" ,"P2_Position_Z"])

        print('Finished Init')

    def save_end_effector_data(self, time):
        position = self.EndEffectorMO.position.value
        position2 = self.EndEffectorMO2.position.value

        try:
            with open(self.csv_file_path, mode='a', newline='') as file:
                writer = csv.writer(file)
                writer.writerow([time,self.Pressure,position[0][0],position[0][1],position[0][2],position2[0][0],position2[0][1],position2[0][2]])
        except Exception as e:
            print(f"Error al escribir en archivo csv:{e}")

    def update_pressure_increase(self, pressure, spc):
        pressure += self.Increment
        if pressure > self.Maxpressure and self.animation_finished==False:
            pressure = self.Maxpressure
        spc.value.value = [pressure]
        return pressure

    def update_pressure_decrease(self, pressure, spc):
        pressure -= self.Increment
        if pressure < 0 and not self.animation_finished:
            pressure = 0
        spc.value.value = [pressure]
        return pressure


    def onAnimateBeginEvent(self, eventType):
        # print(f"Current End-Effector position: {self.EndEffectorMO.position.value}")
        # print(f"pressure: {self.Pressure}")

        # Aquí obtienes el tiempo actual de la simulación
        current_time = self.RootNode.time.value

        # Imprimir mensaje si la animación ha terminado
        if self.animation_finished:
            # print("animación terminada")
            self.RootNode.dt = 0
            self.Pressure = 0
            return

        # Guardar datos del EndEffector
        self.save_end_effector_data(current_time)

        if not self.Decreasing:
            # Incrementar presiones
            self.Pressure = self.update_pressure_increase(self.Pressure, self.SPC)

            if self.Pressure >= self.Maxpressure:
                self.Decreasing = True
        else:
            # Decrementar presiones
            self.Pressure = self.update_pressure_decrease(self.Pressure, self.SPC)

            if self.Pressure <= 0:
                self.Decreasing = False
                self.animation_finished = True


def createScene(rootNode):

                rootNode.addObject(
                    "RequiredPlugin",
                    pluginName="""SofaPython3
                    SoftRobots
                    SoftRobots.Inverse
                    Sofa.Component.AnimationLoop
                    Sofa.Component.Constraint.Lagrangian.Correction
                    Sofa.Component.Constraint.Lagrangian.Solver
                    Sofa.Component.Engine.Select
                    Sofa.Component.IO.Mesh
                    Sofa.Component.LinearSolver.Direct
                    Sofa.Component.LinearSolver.Iterative
                    Sofa.Component.Mapping.Linear
                    Sofa.Component.Mapping.MappedMatrix
                    Sofa.Component.Mapping.NonLinear
                    Sofa.Component.Mass
                    Sofa.Component.ODESolver.Backward
                    Sofa.Component.Setting
                    Sofa.Component.SolidMechanics.FEM.Elastic
                    Sofa.Component.SolidMechanics.Spring
                    Sofa.Component.StateContainer
                    Sofa.Component.Topology.Container.Constant
                    Sofa.Component.Topology.Container.Dynamic
                    Sofa.Component.Visual
                    Sofa.GL.Component.Rendering3D
                    Sofa.GL.Component.Shader"""
                )

                rootNode.addObject(
                    "VisualStyle",
                    displayFlags="""
                        hideWireframe
                        showBehaviorModels
                        hideCollisionModels
                        hideBoundingCollisionModels
                        showForceFields
                        showInteractionForceFields""",
                )
                # rootNode.addObject('VisualStyle', displayFlags='showVisualModels hideBehaviorModels showCollisionModels hideBoundingCollisionModels showForceFields showInteractionForceFields hideWireframe')
                rootNode.addObject('RequiredPlugin', name='Sofa.Component.Topology.Mapping') # Needed to use components [Tetra2TriangleTopologicalMapping]
                rootNode.addObject('RequiredPlugin', name='Sofa.Component.Topology.Container.Grid')
                rootNode.addObject('RequiredPlugin', name='Sofa.Component.Constraint.Projective') # Needed to use components [FixedConstraint]
                rootNode.addObject('RequiredPlugin', name='Sofa.Component.SolidMechanics.FEM.HyperElastic') # Needed to use components [TetrahedronHyperelasticityFEMForceField]
                rootNode.addObject('FreeMotionAnimationLoop')
                rootNode.addObject('GenericConstraintSolver', maxIterations=100, tolerance = 0.0000001)
                rootNode.dt = 0.001

		#cubito
                # cubito = rootNode.addChild('cubito')
                # cubito.addObject('EulerImplicitSolver', name="cg_odesolver", printLog="false")
                # cubito.addObject('SparseLDLSolver', name='preconditioner')
                # cubito.addObject('CGLinearSolver', iterations="25", name="linear solver", tolerance="1.0e-9", threshold="1.0e-9")
                # Loader = cubito.addObject('MeshVTKLoader', name='loader', filename='CubitoEstirar.vtk')
                # cubito.addObject('MechanicalObject', name='tetras', template='Vec3', showIndices=False)
                # cubito.addObject('MeshMatrixMass', totalMass="1.0")


                # cubito.addObject('TetrahedronSetTopologyContainer', src='@loader', name='container')
                # cubito.addObject('TetrahedronSetTopologyModifier', name='Modifier')
                # cubito.addObject('TetrahedronSetGeometryAlgorithms', template="Vec3", name="GeomAlgo")
                # cubito.addObject('TetrahedronHyperelasticityFEMForceField', name="FEM", ParameterSet="5000 7000 10", materialName="MooneyRivlin")

                # cubito.addObject('BoxROI', name='boxROI', box=[-13, -0.5, -13,  13, 1.5, 13], drawBoxes="1", tetrahedra="@container.tetrahedra")
                # cubito.addObject('FixedConstraint', indices="@box.indices")


        #cubito
                cubito = rootNode.addChild('cubito')
                cubito.addObject('EulerImplicitSolver', name="cg_odesolver", printLog="false")
                cubito.addObject('SparseLDLSolver', name='preconditioner')
                cubito.addObject('CGLinearSolver', iterations="25", name="linear solver", tolerance="1.0e-9", threshold="1.0e-9")
                Loader = cubito.addObject('MeshVTKLoader', name='loader', filename='CubitoEstirar.vtk')
                Container = cubito.addObject('TetrahedronSetTopologyContainer', src='@loader', name='container')
                cubito.addObject('TetrahedronSetTopologyModifier')
                MO = cubito.addObject('MechanicalObject', name='tetras', template='Vec3', showIndices=False)
                cubito.addObject('UniformMass', totalMass=0.5)

                boxROIStiffness = cubito.addObject('BoxROI', name='boxROIStiffness', box=[-13, 18.5, -13,  13, 20.5, 13], drawBoxes=1, position="@tetras.rest_position", tetrahedra="@container.tetrahedra")
                Container.init()
                MO.init()
                boxROIStiffness.init()
                YM1 = 148500
                YM2 = YM1*100
                YMArray = np.ones(len(Loader.tetras))
                IdxElementsInROI = np.array(boxROIStiffness.tetrahedronIndices.value)
                YMArray[IdxElementsInROI] = 15000000
                cubito.addObject('TetrahedronFEMForceField', template='Vec3', name='FEM', method='large', poissonRatio=0.49,  youngModulus = YMArray.flatten().tolist(), initialPoints=IdxElementsInROI)

                boxROICubito = cubito.addObject('BoxROI', name='boxROICubito', box=[-13, 1.5, -13,  13, 20.5, 13], drawBoxes=1, position="@tetras.rest_position", tetrahedra="@container.tetrahedra")
                boxROICubito.init()
                IdxElementsInROICubito = np.array(boxROICubito.tetrahedronIndices.value)
                # cubito.addObject('TetrahedronHyperelasticityFEMForceField', name="FEMhyper", ParameterSet="8900 80000 0.6666", materialName="MooneyRivlin") #C01, C10, k0 --- 0.008 0.00089
                cubito.addObject('TetrahedronHyperelasticityFEMForceField', name="FEM", ParameterSet="34480.2759 310340.483", materialName="NeoHookean")

                cubito.addObject('BoxROI', name='boxROI', box=[-13, -0.5, -13,  13, 1.5, 13], drawBoxes=1, position="@tetras.rest_position", tetrahedra="@container.tetrahedra")
                cubito.addObject('RestShapeSpringsForceField', points='@boxROI.indices', stiffness=1e12)
                cubito.addObject('GenericConstraintCorrection', linearSolver='@preconditioner')


        # Punto "End-effector"

                EndEffectorNode = cubito.addChild("EndEffectorNode")
                EndEffectorMO = EndEffectorNode.addObject("MechanicalObject", position=[[0,LadoCubo,0]], showObject=True, showObjectScale=10)
                EndEffectorNode.addObject("BarycentricMapping")

        # Punto "End-effector"

                EndEffectorNode2 = cubito.addChild("EndEffectorNode_2")
                EndEffectorMO2 = EndEffectorNode2.addObject("MechanicalObject", position=[[0,LadoCubo/2,LadoCubo/2]], showObject=True, showObjectScale=10)
                EndEffectorNode2.addObject("BarycentricMapping")


        #cubito/fibers

                FiberNode = cubito.addChild("FiberReinforcementNode")
                Density = 30
                IncrementAngle = 2*np.pi/Density
                Radius = 8
                NLevels = 7
                LevelHeight = 2
                Points = []
                Edges = []
                for i in range(NLevels):
                    for j in range(0,30):
                        Angle = j*IncrementAngle
                        Coords = [Radius*np.cos(Angle), 4+i*LevelHeight, Radius*np.sin(Angle)]
                        Points.append(Coords)
                        if j>=1:
                            Edges.append([i*Density+j-1,i*Density+j])
                            if j==Density-1:
                                Edges.append([i*Density+j, i*Density+j-Density+1])

                FiberNode.addObject("Mesh", position=Points, name="Mesh", edges=Edges)
                FiberNode.addObject("MechanicalObject", showObject=True, showObjectScale=10)
                FiberNode.addObject("MeshSpringForceField", linesStiffness=1e9)
                FiberNode.addObject("BarycentricMapping")


		#cubito/cavity
                cavity = cubito.addChild('cavity')
                cavity.addObject('MeshSTLLoader', name='loader', filename='CubitoEstirar_Cavity.stl')
                cavity.addObject('MeshTopology', src='@loader', name='topo')
                cavity.addObject('MechanicalObject', name='cavity')
                SPC = cavity.addObject('SurfacePressureConstraint', triangles='@topo.triangles', value=0, valueType=0)
                #cavity.addObject('BarycentricMapping', name='mapping',  mapForces=True, mapMasses=False)
                cavity.addObject('BarycentricMapping', name='mapping',  mapForces=True, mapMasses=True)


		#cubito/cubitoVisu
                cubitoVisu = cubito.addChild('visu')
                cubitoVisu.addObject("MeshSTLLoader", filename="Cubito_Estirar_visu.stl", name="loader")
                cubitoVisu.addObject("OglModel", src="@loader")
                cubitoVisu.addObject("BarycentricMapping")

                rootNode.addObject(Controller(name="ActuationController", RootNode=rootNode, SPC=SPC,  EndEffectorMO=EndEffectorMO, EndEffectorMO2=EndEffectorMO2 ))

                return rootNode
